// COMSOL Multiphysics 5.4.0.388 model "210113_54_2D_tut-cantilever.mph"
// Outline of the model tree

Parameters
  CanW = 100[mm]  // Cantilever Length
  CanH = 10[mm]  // Cantilever Width
  FixedLoad = -1E2[N]  // Point load on top right
  HighT = 373.15[K]  // Elevated temp. (100C)
  AmbientT = 293.15[K]  // Ambient room temp.

Geometry
  geom1 "Geometry 1" (2D, length unit m)
    r1: Rectangle | size = {CanW, CanH}
    fin: Finalize "Form Union"

Materials
  mat1: Common "Concrete" on all domains
    def "Basic"
      thermalexpansioncoefficient = 10e-6[1/K]
      density = 2300[kg/m^3]
      thermalconductivity = 1.8[W/(m*K)]
      heatcapacity = 880[J/(kg*K)]
    Enu "Young's modulus and Poisson's ratio"
      youngsmodulus = 25e9[Pa]
      poissonsratio = 0.20

Physics
  solid: SolidMechanics on all domains
    dependent variable u = {u, v, w}
    Type2D.Type2D = PlaneStress
    d.d = CanH
    lemm1: LinearElasticModel "Linear Elastic Material 1" (default)
    free1: Free (default)
    init1: init "Initial Values 1" (default)
    fix1: Fixed "Fixed Constraint 1" on boundaries 1
    pl1: PointLoad on points 4 | Fp = {0, FixedLoad, 0}
  ht: HeatTransfer "Heat Transfer in Solids" on all domains
    dependent variable T
    PhysicalModelProperty.Tref = 293.15
    solid1: SolidHeatTransferModel "Solid 1" (default)
    init1: init "Initial Values 1" (default)
    ins1: ThermalInsulation (default)
    temp1: TemperatureBoundary "Temperature 1" on boundaries 1 | T0 = AmbientT

Mesh
  mesh1 "Mesh 1"
    size: MeshSizeDefault | hmax = 0.0067; hmin = 3.0E-5; hcurve = 0.3; hgrad = 1.3
    map1: Map "Mapped 1" on remaining entities
      dis1: Distribution on boundaries 2 | type = explicit; explicit = range(0,1[mm],CanW)
      dis2: Distribution on boundaries 1 | type = explicit; explicit = range(0,1[mm],CanH)

Studies
  std1 "Study 1"
    stat: Stationary

Solver configurations
  sol1 "Solution 1" (study std1)
    v1: Variables "Dependent Variables 1"
    s1: Stationary "Stationary Solver 1"
      fc1: FullyCoupled | linsolver = d1; initstep = 0.01; minstep = 1.0E-6; maxiter = 50
      d1: Direct | pivotperturb = 1.0E-13

Datasets
  dset1: Solution | solution = sol1
  cln1: CutLine2D | data = dset1; method = pointdir; genpoints = {{0, CanH}, {CanW, CanH}}; pdpoint = {0, CanH}

Plots
  pg1: PlotGroup2D "Stress (solid)" | data = dset1
    surf1: Surface | expr = solid.mises
      def: Deform "Deformation" | expr = {u, v}; descr = Displacement field
  pg2: PlotGroup2D "Temperature (ht)" | data = dset1
    surf1: Surface | expr = T
  pg3: PlotGroup2D "Isothermal Contours (ht)" | data = dset1
    con1: Contour | expr = T

Exports
  data1: Data
    data = cln1
    expr = {solid.elogxx, solid.elogyy, solid.elogzz, solid.sx, solid.sy, solid.sz, T}
    unit = {1, 1, 1, N/m^2, N/m^2, N/m^2, K}
    descr = {"Logarithmic strain tensor, xx component", "Logarithmic strain tensor, yy component", "Logarithmic strain tensor, zz component", "Stress tensor, x component", "Stress tensor, y component", "Stress tensor, z component", Temperature}
    filename = C:\Users\ben\Desktop\comsol\210112_data\tut-concrete.txt
    sdim = 1
    sort = on